*Heading
** Job name: cook_3d Model name: cook_3d
*Preprint, echo=NO, model=NO, history=NO, contact=NO
**
** PARTS
**
*Part, name=c3d4h_04
*Node
      1,          48.,          52.,           5.
      2,          48.,          52.,           0.
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*Element, type=C3D4H
 1, 72, 56,  5, 30
 2, 72, 55, 56, 28
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*Node
     79,          48.,          52.,          2.5
*Nset, nset=c3d4h_04-RefPt_, internal
79,
*Nset, nset=_PickedSet2, internal, generate
  1,  78,   1
*Elset, elset=_PickedSet2, internal, generate
   1,  216,    1
*Nset, nset=_PickedSet24, internal
  1,  4,  5,  6,  9, 10
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*Elset, elset=_PickedSet24, internal
   3,  16,  22,  27,  28,  29
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*Nset, nset=_PickedSet25, internal
  2,  3,  7,  8, 11, 12
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*Elset, elset=_PickedSet25, internal
  14,  23,  24,  37,  38,  45
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*Nset, nset=Set-1
  1,  2,  3,  4,  5,  6
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*Elset, elset=Set-1
   3,  10,  11,  14,  16,  17
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*Nset, nset=RP
 79,
*Nset, nset=Symmetry
  1,  2,  3,  4,  5,  6
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*Elset, elset=Symmetry
   3,  14,  16,  22,  23,  24
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*Nset, nset=Fix
  9, 10, 11, 12, 15, 16, 33, 35, 36, 37, 41, 43, 45, 60, 65
*Elset, elset=Fix
  65,  66,  68,  71,  72,  78, 100, 103, 114, 116, 128, 130, 134, 135, 149, 157
*Nset, nset=Corner
 4,
*Elset, elset=_Constraint_S3, internal
  10,  13,  17,  21,  30,  34,  40,  41, 175, 191, 195, 202, 209, 214
*Elset, elset=_Constraint_S2, internal
 171,
*Elset, elset=_Constraint_S4, internal
 204,
*Surface, type=ELEMENT, name=Constraint
_Constraint_S3, S3
_Constraint_S2, S2
_Constraint_S4, S4
** Section: Section-1
*Solid Section, elset=_PickedSet2, material=Material-1
1.,
*End Part
**
*Part, name=c3d4h_08
*Node
      1,          48.,          52.,           5.
      2,          48.,          52.,           0.
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*Element, type=C3D4H
  1, 208,  36,  33,   6
  2, 208, 209, 106,  33
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*Node
    236,          48.,          52.,          2.5
*Nset, nset=c3d4h_08-RefPt_, internal
236,
*Nset, nset=_PickedSet2, internal, generate
   1,  235,    1
*Elset, elset=_PickedSet2, internal, generate
   1,  742,    1
*Nset, nset=_PickedSet24, internal
   1,   4,   5,   6,   9,  10
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*Elset, elset=_PickedSet24, internal
  10,  13,  19,  41,  42,  44
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*Nset, nset=_PickedSet25, internal
   2,   3,   7,   8,  11,  12
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*Elset, elset=_PickedSet25, internal
   9,  14,  15,  16,  25,  32
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*Nset, nset=Set-1
  1,  2,  3,  4,  5,  6
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*Elset, elset=Set-1
   8,   9,  13,  14,  16,  42
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*Nset, nset=RP
 236,
*Nset, nset=Symmetry
   1,   2,   3,   4,   5,   6
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*Elset, elset=Symmetry
   9,  10,  13,  14,  15,  16
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*Nset, nset=Fix
   9,  10,  11,  12,  15,  16
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*Elset, elset=Fix
 244, 246, 254, 256, 259, 261
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*Nset, nset=Corner
 4,
*Elset, elset=_Constraint_S3, internal
  11,  47,  54, 111, 139, 153
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*Elset, elset=_Constraint_S4, internal
  48, 152, 161, 611
*Elset, elset=_Constraint_S2, internal
 110, 581, 703, 721, 726, 734
*Elset, elset=_Constraint_S1, internal
 550, 693
*Surface, type=ELEMENT, name=Constraint
_Constraint_S3, S3
_Constraint_S4, S4
_Constraint_S2, S2
_Constraint_S1, S1
** Section: Section-1
*Solid Section, elset=_PickedSet2, material=Material-1
1.,
*End Part
**
*Part, name=c3d4h_16
*Node
      1,          48.,          52.,           5.
      2,          48.,          52.,           0.
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*Element, type=C3D4H
  1, 672, 673, 674, 263
  2, 673, 204, 675, 313
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*Node
    926,          48.,          52.,          2.5
*Nset, nset=c3d4h_16-RefPt_, internal
926,
*Nset, nset=_PickedSet2, internal, generate
   1,  925,    1
*Elset, elset=_PickedSet2, internal, generate
    1,  3479,     1
*Nset, nset=_PickedSet24, internal
   1,   4,   5,   6,   9,  10
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*Elset, elset=_PickedSet24, internal
    6,   27,   34,   35,   44,   80
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*Nset, nset=_PickedSet25, internal
   2,   3,   7,   8,  11,  12
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*Elset, elset=_PickedSet25, internal
   13,   31,   55,   87,   88,  120
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*Nset, nset=Set-1
   1,   2,   3,   4,   5,   6
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*Elset, elset=Set-1
   34,   80,   88,  159,  166,  190
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*Nset, nset=RP
 926,
*Nset, nset=Symmetry
   1,   2,   3,   4,   5,   6
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*Elset, elset=Symmetry
    6,   13,   27,   31,   34,   35
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*Nset, nset=Fix
   9,  10,  11,  12,  15,  16
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*Elset, elset=Fix
  955,  986,  987, 1103, 1249, 1268
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*Nset, nset=Corner
 4,
*Elset, elset=_Constraint_S3, internal
  196,  279,  453,  576,  581,  602
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*Elset, elset=_Constraint_S4, internal
  837, 2754, 3210, 3333, 3444
*Elset, elset=_Constraint_S2, internal
 3184, 3344, 3372, 3451
*Elset, elset=_Constraint_S1, internal
 3278, 3409
*Surface, type=ELEMENT, name=Constraint
_Constraint_S3, S3
_Constraint_S4, S4
_Constraint_S2, S2
_Constraint_S1, S1
** Section: Section-1
*Solid Section, elset=_PickedSet2, material=Material-1
1.,
*End Part
**
*Part, name=c3d4h_32
*Node
      1,          48.,          52.,           5.
      2,          48.,          52.,           0.
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*Element, type=C3D4H
   1, 2368, 2369, 2370, 2371
   2, 2368, 2372, 2373, 2374
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*Node
   4382,          48.,          52.,          2.5
*Nset, nset=c3d4h_32-RefPt_, internal
4382,
*Nset, nset=_PickedSet2, internal, generate
    1,  4381,     1
*Elset, elset=_PickedSet2, internal, generate
     1,  19209,      1
*Nset, nset=_PickedSet24, internal
    1,    4,    5,    6,    9,   10
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*Elset, elset=_PickedSet24, internal
    24,    30,    63,    80,   138,   139
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*Nset, nset=_PickedSet25, internal
    2,    3,    7,    8,   11,   12
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*Elset, elset=_PickedSet25, internal
    84,   112,   178,   226,   245,   258
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*Nset, nset=Set-1
   1,   2,   3,   4,   5,   6
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*Elset, elset=Set-1
    47,    63,   112,   141,   160,   226
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*Nset, nset=RP
 4382,
*Nset, nset=Symmetry
    1,    2,    3,    4,    5,    6
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*Elset, elset=Symmetry
    24,    30,    63,    80,    84,   112
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*Nset, nset=Fix
    9,   10,   11,   12,   15,   16
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*Elset, elset=Fix
  4961,  6024,  6197,  6348,  6375,  6395
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*Nset, nset=Corner
 4,
*Elset, elset=_Constraint_S3, internal
    47,   339,  1123,  1146,  1538,  1618
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*Elset, elset=_Constraint_S1, internal
    87,  4056, 15443, 16743, 16854, 16859, 16861, 17295, 17407, 17590, 17699, 18751, 19132
*Elset, elset=_Constraint_S4, internal
  1780,  2154,  2461,  2477,  2487,  2646
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*Elset, elset=_Constraint_S2, internal
  2421,  3642,  4058, 15135, 16641, 16797, 19101
*Surface, type=ELEMENT, name=Constraint
_Constraint_S3, S3
_Constraint_S1, S1
_Constraint_S4, S4
_Constraint_S2, S2
** Section: Section-1
*Solid Section, elset=_PickedSet2, material=Material-1
1.,
*End Part
**
*Part, name=c3d8h_04
*Node
      1,          48.,          52.,           5.
      2,          48.,          52.,           0.
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*Element, type=C3D8H
1, 28, 56, 72, 54,  1, 19, 52, 22
2, 56, 30, 55, 72, 19,  2, 20, 52
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*Node
     76,          48.,          52.,          2.5
*Nset, nset=c3d8h_04-RefPt_, internal
76,
*Nset, nset=_PickedSet2, internal, generate
  1,  75,   1
*Elset, elset=_PickedSet2, internal, generate
  1,  32,   1
*Nset, nset=_PickedSet24, internal
  1,  4,  5,  8,  9, 10
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*Elset, elset=_PickedSet24, internal
  1,  3,  5,  7,  9, 10, 11, 12, 18, 20, 22, 24, 26, 28, 30, 32
*Nset, nset=_PickedSet25, internal
  2,  3,  6,  7, 11, 12
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*Elset, elset=_PickedSet25, internal
  2,  4,  6,  8, 13, 14, 15, 16, 17, 19, 21, 23, 25, 27, 29, 31
*Nset, nset=Set-1
  1,  2,  3,  4,  5,  6
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*Elset, elset=Set-1, generate
  1,  32,   1
*Nset, nset=RP
 76,
*Nset, nset=Symmetry
  1,  2,  3,  4,  5,  6
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*Elset, elset=Symmetry, generate
  1,  32,   1
*Nset, nset=Fix
  9, 10, 11, 12, 15, 16, 33, 36, 37, 38, 41, 43, 45, 60, 67
*Elset, elset=Fix
  9, 11, 13, 15, 19, 20, 23, 24
*Nset, nset=Corner
 4,
*Elset, elset=_Constraint_S2, internal
  1,  2,  3,  4, 25, 26, 27, 28
*Surface, type=ELEMENT, name=Constraint
_Constraint_S2, S2
** Section: Section-1
*Solid Section, elset=_PickedSet2, material=Material-1
1.,
*End Part
**
*Part, name=c3d8h_08
*Node
      1,          48.,          52.,           5.
      2,          48.,          52.,           0.
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*Element, type=C3D8H
 1,  40, 124, 208, 106,   1,  19, 100,  26
 2, 124,  44, 115, 208,  19,   2,  20, 100
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*Node
    244,          48.,          52.,          2.5
*Nset, nset=c3d8h_08-RefPt_, internal
244,
*Nset, nset=_PickedSet2, internal, generate
   1,  243,    1
*Elset, elset=_PickedSet2, internal, generate
   1,  128,    1
*Nset, nset=_PickedSet24, internal
   1,   4,   5,   8,   9,  10
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*Elset, elset=_PickedSet24, internal
   1,   3,   5,   7,   9,  11
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*Nset, nset=_PickedSet25, internal
   2,   3,   6,   7,  11,  12
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*Elset, elset=_PickedSet25, internal
   2,   4,   6,   8,  10,  12
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*Nset, nset=Set-1
  1,  2,  3,  4,  5,  6
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*Elset, elset=Set-1
   1,   2,   3,   4,   5,   6
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*Nset, nset=RP
 244,
*Nset, nset=Symmetry
   1,   2,   3,   4,   5,   6
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*Elset, elset=Symmetry, generate
   1,  128,    1
*Nset, nset=Fix
   9,  10,  11,  12,  15,  16
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*Elset, elset=Fix
 33, 37, 41, 45, 49, 53, 57, 61, 71, 72, 79, 80, 87, 88, 95, 96
*Nset, nset=Corner
 4,
*Elset, elset=_Constraint_S2, internal
   1,   2,   3,   4,   5,   6,   7,   8,  97,  98,  99, 100, 101, 102, 103, 104
*Surface, type=ELEMENT, name=Constraint
_Constraint_S2, S2
** Section: Section-1
*Solid Section, elset=_PickedSet2, material=Material-1
1.,
*End Part
**
*Part, name=c3d8h_16
*Node
      1,          48.,          52.,           5.
      2,          48.,          52.,           0.
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*Element, type=C3D8H
  1,  64, 308, 672, 210,   1,  19, 196,  34
  2, 308,  72, 259, 672,  19,   2,  20, 196
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*Node
    868,          48.,          52.,          2.5
*Nset, nset=c3d8h_16-RefPt_, internal
868,
*Nset, nset=_PickedSet2, internal, generate
   1,  867,    1
*Elset, elset=_PickedSet2, internal, generate
   1,  512,    1
*Nset, nset=_PickedSet24, internal
   1,   4,   5,   8,   9,  10
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*Elset, elset=_PickedSet24, internal
   1,   3,   5,   7,   9,  11
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*Nset, nset=_PickedSet25, internal
   2,   3,   6,   7,  11,  12
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*Elset, elset=_PickedSet25, internal
   2,   4,   6,   8,  10,  12
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*Nset, nset=Set-1
   1,   2,   3,   4,   5,   6
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*Elset, elset=Set-1
   1,   2,   3,   4,   5,   6
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*Nset, nset=RP
 868,
*Nset, nset=Symmetry
   1,   2,   3,   4,   5,   6
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*Elset, elset=Symmetry, generate
   1,  512,    1
*Nset, nset=Fix
   9,  10,  11,  12,  15,  16
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*Elset, elset=Fix
 129, 137, 145, 153, 161, 169
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*Nset, nset=Corner
 4,
*Elset, elset=_Constraint_S2, internal
   1,   2,   3,   4,   5,   6
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*Surface, type=ELEMENT, name=Constraint
_Constraint_S2, S2
** Section: Section-1
*Solid Section, elset=_PickedSet2, material=Material-1
1.,
*End Part
**
*Part, name=c3d8h_32
*Node
      1,          48.,          52.,           5.
      2,          48.,          52.,           0.
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*Element, type=C3D8H
   1,  120,  946, 2746,  496,    1,   19,  406,   54
   2,  946,  947, 2747, 2746,   19,   20,  407,  406
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*Node
   5446,          48.,          52.,          2.5
*Nset, nset=c3d8h_32-RefPt_, internal
5446,
*Nset, nset=_PickedSet2, internal, generate
    1,  5445,     1
*Elset, elset=_PickedSet2, internal, generate
    1,  4096,     1
*Nset, nset=_PickedSet24, internal
    1,    4,    5,    8,    9,   10
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*Elset, elset=_PickedSet24, internal
    1,    5,    9,   13,   17,   21
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*Nset, nset=_PickedSet25, internal
    2,    3,    6,    7,   11,   12
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*Elset, elset=_PickedSet25, internal
    4,    8,   12,   16,   20,   24
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*Nset, nset=Set-1
   1,   2,   3,   4,   5,   6
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*Elset, elset=Set-1
    1,    4,    5,    8,    9,   12
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*Nset, nset=RP
 5446,
*Nset, nset=Symmetry
    1,    2,    3,    4,    5,    6
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*Elset, elset=Symmetry
    1,    4,    5,    8,    9,   12
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*Nset, nset=Fix
    9,   10,   11,   12,   15,   16
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*Elset, elset=Fix
 1025, 1041, 1057, 1073, 1089, 1105
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*Nset, nset=Corner
 4,
*Elset, elset=_Constraint_S2, internal
    1,    2,    3,    4,    5,    6
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*Surface, type=ELEMENT, name=Constraint
_Constraint_S2, S2
** Section: Section-1
*Solid Section, elset=_PickedSet2, material=Material-1
1.,
*End Part
**
*Part, name=c3d8ih_04
*Node
      1,          48.,          52.,           5.
      2,          48.,          52.,           0.
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*Element, type=C3D8IH
1, 28, 56, 72, 54,  1, 19, 52, 22
2, 56, 30, 55, 72, 19,  2, 20, 52
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*Node
     76,          48.,          52.,          2.5
*Nset, nset=c3d8ih_04-RefPt_, internal
76,
*Nset, nset=_PickedSet2, internal, generate
  1,  75,   1
*Elset, elset=_PickedSet2, internal, generate
  1,  32,   1
*Nset, nset=_PickedSet24, internal
  1,  4,  5,  8,  9, 10
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*Elset, elset=_PickedSet24, internal
  1,  3,  5,  7,  9, 10, 11, 12, 18, 20, 22, 24, 26, 28, 30, 32
*Nset, nset=_PickedSet25, internal
  2,  3,  6,  7, 11, 12
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*Elset, elset=_PickedSet25, internal
  2,  4,  6,  8, 13, 14, 15, 16, 17, 19, 21, 23, 25, 27, 29, 31
*Nset, nset=Set-1
  1,  2,  3,  4,  5,  6
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*Elset, elset=Set-1, generate
  1,  32,   1
*Nset, nset=RP
 76,
*Nset, nset=Symmetry
  1,  2,  3,  4,  5,  6
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*Elset, elset=Symmetry, generate
  1,  32,   1
*Nset, nset=Fix
  9, 10, 11, 12, 15, 16, 33, 36, 37, 38, 41, 43, 45, 60, 67
*Elset, elset=Fix
  9, 11, 13, 15, 19, 20, 23, 24
*Nset, nset=Corner
 4,
*Elset, elset=_Constraint_S2, internal
  1,  2,  3,  4, 25, 26, 27, 28
*Surface, type=ELEMENT, name=Constraint
_Constraint_S2, S2
** Section: Section-1
*Solid Section, elset=_PickedSet2, material=Material-1
1.,
*End Part
**
*Part, name=c3d8ih_08
*Node
      1,          48.,          52.,           5.
      2,          48.,          52.,           0.
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*Element, type=C3D8IH
 1,  40, 124, 208, 106,   1,  19, 100,  26
 2, 124,  44, 115, 208,  19,   2,  20, 100
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*Node
    244,          48.,          52.,          2.5
*Nset, nset=c3d8ih_08-RefPt_, internal
244,
*Nset, nset=_PickedSet2, internal, generate
   1,  243,    1
*Elset, elset=_PickedSet2, internal, generate
   1,  128,    1
*Nset, nset=_PickedSet24, internal
   1,   4,   5,   8,   9,  10
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*Elset, elset=_PickedSet24, internal
   1,   3,   5,   7,   9,  11
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*Nset, nset=_PickedSet25, internal
   2,   3,   6,   7,  11,  12
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*Elset, elset=_PickedSet25, internal
   2,   4,   6,   8,  10,  12
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*Nset, nset=Set-1
  1,  2,  3,  4,  5,  6
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*Elset, elset=Set-1
   1,   2,   3,   4,   5,   6
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*Nset, nset=RP
 244,
*Nset, nset=Symmetry
   1,   2,   3,   4,   5,   6
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*Elset, elset=Symmetry, generate
   1,  128,    1
*Nset, nset=Fix
   9,  10,  11,  12,  15,  16
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*Elset, elset=Fix
 33, 37, 41, 45, 49, 53, 57, 61, 71, 72, 79, 80, 87, 88, 95, 96
*Nset, nset=Corner
 4,
*Elset, elset=_Constraint_S2, internal
   1,   2,   3,   4,   5,   6,   7,   8,  97,  98,  99, 100, 101, 102, 103, 104
*Surface, type=ELEMENT, name=Constraint
_Constraint_S2, S2
** Section: Section-1
*Solid Section, elset=_PickedSet2, material=Material-1
1.,
*End Part
**
*Part, name=c3d8ih_16
*Node
      1,          48.,          52.,           5.
      2,          48.,          52.,           0.
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*Element, type=C3D8IH
  1,  64, 308, 672, 210,   1,  19, 196,  34
  2, 308,  72, 259, 672,  19,   2,  20, 196
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*Node
    868,          48.,          52.,          2.5
*Nset, nset=c3d8ih_16-RefPt_, internal
868,
*Nset, nset=_PickedSet2, internal, generate
   1,  867,    1
*Elset, elset=_PickedSet2, internal, generate
   1,  512,    1
*Nset, nset=_PickedSet24, internal
   1,   4,   5,   8,   9,  10
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*Elset, elset=_PickedSet24, internal
   1,   3,   5,   7,   9,  11
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*Nset, nset=_PickedSet25, internal
   2,   3,   6,   7,  11,  12
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*Elset, elset=_PickedSet25, internal
   2,   4,   6,   8,  10,  12
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*Nset, nset=Set-1
   1,   2,   3,   4,   5,   6
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*Elset, elset=Set-1
   1,   2,   3,   4,   5,   6
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*Nset, nset=RP
 868,
*Nset, nset=Symmetry
   1,   2,   3,   4,   5,   6
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*Elset, elset=Symmetry, generate
   1,  512,    1
*Nset, nset=Fix
   9,  10,  11,  12,  15,  16
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*Elset, elset=Fix
 129, 137, 145, 153, 161, 169
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*Nset, nset=Corner
 4,
*Elset, elset=_Constraint_S2, internal
   1,   2,   3,   4,   5,   6
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*Surface, type=ELEMENT, name=Constraint
_Constraint_S2, S2
** Section: Section-1
*Solid Section, elset=_PickedSet2, material=Material-1
1.,
*End Part
**
*Part, name=c3d8ih_32
*Node
      1,          48.,          52.,           5.
      2,          48.,          52.,           0.
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*Element, type=C3D8IH
   1,  120,  946, 2746,  496,    1,   19,  406,   54
   2,  946,  947, 2747, 2746,   19,   20,  407,  406
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*Node
   5446,          48.,          52.,          2.5
*Nset, nset=c3d8ih_32-RefPt_, internal
5446,
*Nset, nset=_PickedSet2, internal, generate
    1,  5445,     1
*Elset, elset=_PickedSet2, internal, generate
    1,  4096,     1
*Nset, nset=_PickedSet24, internal
    1,    4,    5,    8,    9,   10
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*Elset, elset=_PickedSet24, internal
    1,    5,    9,   13,   17,   21
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*Nset, nset=_PickedSet25, internal
    2,    3,    6,    7,   11,   12
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*Elset, elset=_PickedSet25, internal
    4,    8,   12,   16,   20,   24
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*Nset, nset=Set-1
   1,   2,   3,   4,   5,   6
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*Elset, elset=Set-1
    1,    4,    5,    8,    9,   12
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*Nset, nset=RP
 5446,
*Nset, nset=Symmetry
    1,    2,    3,    4,    5,    6
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*Elset, elset=Symmetry
    1,    4,    5,    8,    9,   12
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*Nset, nset=Fix
    9,   10,   11,   12,   15,   16
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*Elset, elset=Fix
 1025, 1041, 1057, 1073, 1089, 1105
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*Nset, nset=Corner
 4,
*Elset, elset=_Constraint_S2, internal
    1,    2,    3,    4,    5,    6
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*Surface, type=ELEMENT, name=Constraint
_Constraint_S2, S2
** Section: Section-1
*Solid Section, elset=_PickedSet2, material=Material-1
1.,
*End Part
**
*Part, name=c3d8rh_04
*Node
      1,          48.,          52.,           5.
      2,          48.,          52.,           0.
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*Element, type=C3D8RH
1, 28, 56, 72, 54,  1, 19, 52, 22
2, 56, 30, 55, 72, 19,  2, 20, 52
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*Node
     76,          48.,          52.,          2.5
*Nset, nset=c3d8rh_04-RefPt_, internal
76,
*Nset, nset=_PickedSet2, internal, generate
  1,  75,   1
*Elset, elset=_PickedSet2, internal, generate
  1,  32,   1
*Nset, nset=_PickedSet24, internal
  1,  4,  5,  8,  9, 10
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*Elset, elset=_PickedSet24, internal
  1,  3,  5,  7,  9, 10, 11, 12, 18, 20, 22, 24, 26, 28, 30, 32
*Nset, nset=_PickedSet25, internal
  2,  3,  6,  7, 11, 12
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*Elset, elset=_PickedSet25, internal
  2,  4,  6,  8, 13, 14, 15, 16, 17, 19, 21, 23, 25, 27, 29, 31
*Nset, nset=Set-1
  1,  2,  3,  4,  5,  6
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*Elset, elset=Set-1, generate
  1,  32,   1
*Nset, nset=RP
 76,
*Nset, nset=Symmetry
  1,  2,  3,  4,  5,  6
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*Elset, elset=Symmetry, generate
  1,  32,   1
*Nset, nset=Fix
  9, 10, 11, 12, 15, 16, 33, 36, 37, 38, 41, 43, 45, 60, 67
*Elset, elset=Fix
  9, 11, 13, 15, 19, 20, 23, 24
*Nset, nset=Corner
 4,
*Elset, elset=_Constraint_S2, internal
  1,  2,  3,  4, 25, 26, 27, 28
*Surface, type=ELEMENT, name=Constraint
_Constraint_S2, S2
** Section: Section-1
*Solid Section, elset=_PickedSet2, material=Material-1
1.,
*End Part
**
*Part, name=c3d8rh_08
*Node
      1,          48.,          52.,           5.
      2,          48.,          52.,           0.
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*Element, type=C3D8RH
 1,  40, 124, 208, 106,   1,  19, 100,  26
 2, 124,  44, 115, 208,  19,   2,  20, 100
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*Node
    244,          48.,          52.,          2.5
*Nset, nset=c3d8rh_08-RefPt_, internal
244,
*Nset, nset=_PickedSet2, internal, generate
   1,  243,    1
*Elset, elset=_PickedSet2, internal, generate
   1,  128,    1
*Nset, nset=_PickedSet24, internal
   1,   4,   5,   8,   9,  10
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*Elset, elset=_PickedSet24, internal
   1,   3,   5,   7,   9,  11
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*Nset, nset=_PickedSet25, internal
   2,   3,   6,   7,  11,  12
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*Elset, elset=_PickedSet25, internal
   2,   4,   6,   8,  10,  12
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*Nset, nset=Set-1
  1,  2,  3,  4,  5,  6
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*Elset, elset=Set-1
   1,   2,   3,   4,   5,   6
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*Nset, nset=RP
 244,
*Nset, nset=Symmetry
   1,   2,   3,   4,   5,   6
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*Elset, elset=Symmetry, generate
   1,  128,    1
*Nset, nset=Fix
   9,  10,  11,  12,  15,  16
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*Elset, elset=Fix
 33, 37, 41, 45, 49, 53, 57, 61, 71, 72, 79, 80, 87, 88, 95, 96
*Nset, nset=Corner
 4,
*Elset, elset=_Constraint_S2, internal
   1,   2,   3,   4,   5,   6,   7,   8,  97,  98,  99, 100, 101, 102, 103, 104
*Surface, type=ELEMENT, name=Constraint
_Constraint_S2, S2
** Section: Section-1
*Solid Section, elset=_PickedSet2, material=Material-1
1.,
*End Part
**
*Part, name=c3d8rh_16
*Node
      1,          48.,          52.,           5.
      2,          48.,          52.,           0.
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*Element, type=C3D8RH
  1,  64, 308, 672, 210,   1,  19, 196,  34
  2, 308,  72, 259, 672,  19,   2,  20, 196
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*Node
    868,          48.,          52.,          2.5
*Nset, nset=c3d8rh_16-RefPt_, internal
868,
*Nset, nset=_PickedSet2, internal, generate
   1,  867,    1
*Elset, elset=_PickedSet2, internal, generate
   1,  512,    1
*Nset, nset=_PickedSet24, internal
   1,   4,   5,   8,   9,  10
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*Elset, elset=_PickedSet24, internal
   1,   3,   5,   7,   9,  11
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*Nset, nset=_PickedSet25, internal
   2,   3,   6,   7,  11,  12
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*Elset, elset=_PickedSet25, internal
   2,   4,   6,   8,  10,  12
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*Nset, nset=Set-1
   1,   2,   3,   4,   5,   6
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*Elset, elset=Set-1
   1,   2,   3,   4,   5,   6
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*Nset, nset=RP
 868,
*Nset, nset=Symmetry
   1,   2,   3,   4,   5,   6
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*Elset, elset=Symmetry, generate
   1,  512,    1
*Nset, nset=Fix
   9,  10,  11,  12,  15,  16
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*Elset, elset=Fix
 129, 137, 145, 153, 161, 169
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*Nset, nset=Corner
 4,
*Elset, elset=_Constraint_S2, internal
   1,   2,   3,   4,   5,   6
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*Surface, type=ELEMENT, name=Constraint
_Constraint_S2, S2
** Section: Section-1
*Solid Section, elset=_PickedSet2, material=Material-1
1.,
*End Part
**
*Part, name=c3d8rh_32
*Node
      1,          48.,          52.,           5.
      2,          48.,          52.,           0.
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*Element, type=C3D8RH
   1,  120,  946, 2746,  496,    1,   19,  406,   54
   2,  946,  947, 2747, 2746,   19,   20,  407,  406
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*Node
   5446,          48.,          52.,          2.5
*Nset, nset=c3d8rh_32-RefPt_, internal
5446,
*Nset, nset=_PickedSet2, internal, generate
    1,  5445,     1
*Elset, elset=_PickedSet2, internal, generate
    1,  4096,     1
*Nset, nset=_PickedSet24, internal
    1,    4,    5,    8,    9,   10
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*Elset, elset=_PickedSet24, internal
    1,    5,    9,   13,   17,   21
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*Nset, nset=_PickedSet25, internal
    2,    3,    6,    7,   11,   12
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*Elset, elset=_PickedSet25, internal
    4,    8,   12,   16,   20,   24
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*Nset, nset=Set-1
   1,   2,   3,   4,   5,   6
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*Elset, elset=Set-1
    1,    4,    5,    8,    9,   12
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*Nset, nset=RP
 5446,
*Nset, nset=Symmetry
    1,    2,    3,    4,    5,    6
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*Elset, elset=Symmetry
    1,    4,    5,    8,    9,   12
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*Nset, nset=Fix
    9,   10,   11,   12,   15,   16
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*Elset, elset=Fix
 1025, 1041, 1057, 1073, 1089, 1105
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*Nset, nset=Corner
 4,
*Elset, elset=_Constraint_S2, internal
    1,    2,    3,    4,    5,    6
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*Surface, type=ELEMENT, name=Constraint
_Constraint_S2, S2
** Section: Section-1
*Solid Section, elset=_PickedSet2, material=Material-1
1.,
*End Part
**
*Part, name=c3d10h_04
*Node
      1,          48.,          52.,           5.
      2,          48.,          52.,           0.
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*Element, type=C3D10H
 1,  72,  56,   5,  30,  81,  80,  79,  83,  82,  84
 2,  72,  55,  56,  28,  86,  85,  81,  88,  87,  89
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*Node
    436,          48.,          52.,          2.5
*Nset, nset=c3d10h_04-RefPt_, internal
436,
*Nset, nset=_PickedSet2, internal, generate
   1,  435,    1
*Elset, elset=_PickedSet2, internal, generate
   1,  216,    1
*Nset, nset=_PickedSet24, internal
   1,   4,   5,   6,   9,  10
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*Elset, elset=_PickedSet24, internal
   3,  16,  22,  27,  28,  29
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*Nset, nset=_PickedSet25, internal
   2,   3,   7,   8,  11,  12
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*Elset, elset=_PickedSet25, internal
  14,  23,  24,  37,  38,  45
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*Nset, nset=Set-1
   1,   2,   3,   4,   5,   6
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*Elset, elset=Set-1
   3,  10,  11,  14,  16,  17
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*Nset, nset=RP
 436,
*Nset, nset=Symmetry
   1,   2,   3,   4,   5,   6
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*Elset, elset=Symmetry
   3,  14,  16,  22,  23,  24
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*Nset, nset=Fix
   9,  10,  11,  12,  15,  16
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*Elset, elset=Fix
  65,  66,  68,  71,  72,  78, 100, 103, 114, 116, 128, 130, 134, 135, 149, 157
*Nset, nset=Corner
 4,
*Elset, elset=_Constraint_S3, internal
  10,  13,  17,  21,  30,  34,  40,  41, 175, 191, 195, 202, 209, 214
*Elset, elset=_Constraint_S2, internal
 171,
*Elset, elset=_Constraint_S4, internal
 204,
*Surface, type=ELEMENT, name=Constraint
_Constraint_S3, S3
_Constraint_S2, S2
_Constraint_S4, S4
** Section: Section-1
*Solid Section, elset=_PickedSet2, material=Material-1
1.,
*End Part
**
*Part, name=c3d10h_08
*Node
      1,          48.,          52.,           5.
      2,          48.,          52.,           0.
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*Element, type=C3D10H
  1, 208,  36,  33,   6, 238, 237, 236, 240, 239, 241
  2, 208, 209, 106,  33, 244, 243, 242, 236, 245, 246
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*Node
   1404,          48.,          52.,          2.5
*Nset, nset=c3d10h_08-RefPt_, internal
1404,
*Nset, nset=_PickedSet2, internal, generate
    1,  1403,     1
*Elset, elset=_PickedSet2, internal, generate
   1,  742,    1
*Nset, nset=_PickedSet24, internal
    1,    4,    5,    6,    9,   10
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*Elset, elset=_PickedSet24, internal
  10,  13,  19,  41,  42,  44
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*Nset, nset=_PickedSet25, internal
    2,    3,    7,    8,   11,   12
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*Elset, elset=_PickedSet25, internal
   9,  14,  15,  16,  25,  32
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*Nset, nset=Set-1
    1,    2,    3,    4,    5,    6
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*Elset, elset=Set-1
   8,   9,  13,  14,  16,  42
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*Nset, nset=RP
 1404,
*Nset, nset=Symmetry
    1,    2,    3,    4,    5,    6
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*Elset, elset=Symmetry
   9,  10,  13,  14,  15,  16
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*Nset, nset=Fix
    9,   10,   11,   12,   15,   16
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*Elset, elset=Fix
 244, 246, 254, 256, 259, 261
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*Nset, nset=Corner
 4,
*Elset, elset=_Constraint_S3, internal
  11,  47,  54, 111, 139, 153
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*Elset, elset=_Constraint_S4, internal
  48, 152, 161, 611
*Elset, elset=_Constraint_S2, internal
 110, 581, 703, 721, 726, 734
*Elset, elset=_Constraint_S1, internal
 550, 693
*Surface, type=ELEMENT, name=Constraint
_Constraint_S3, S3
_Constraint_S4, S4
_Constraint_S2, S2
_Constraint_S1, S1
** Section: Section-1
*Solid Section, elset=_PickedSet2, material=Material-1
1.,
*End Part
**
*Part, name=c3d10h_16
*Node
      1,          48.,          52.,           5.
      2,          48.,          52.,           0.
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*Element, type=C3D10H
  1,  672,  673,  674,  263,  928,  927,  926,  930,  929,  931
  2,  673,  204,  675,  313,  934,  933,  932,  936,  935,  937
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*Node
   5969,          48.,          52.,          2.5
*Nset, nset=c3d10h_16-RefPt_, internal
5969,
*Nset, nset=_PickedSet2, internal, generate
    1,  5968,     1
*Elset, elset=_PickedSet2, internal, generate
    1,  3479,     1
*Nset, nset=_PickedSet24, internal
    1,    4,    5,    6,    9,   10
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*Elset, elset=_PickedSet24, internal
    6,   27,   34,   35,   44,   80
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*Nset, nset=_PickedSet25, internal
    2,    3,    7,    8,   11,   12
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*Elset, elset=_PickedSet25, internal
   13,   31,   55,   87,   88,  120
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*Nset, nset=Set-1
    1,    2,    3,    4,    5,    6
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*Elset, elset=Set-1
   34,   80,   88,  159,  166,  190
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*Nset, nset=RP
 5969,
*Nset, nset=Symmetry
    1,    2,    3,    4,    5,    6
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*Elset, elset=Symmetry
    6,   13,   27,   31,   34,   35
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*Nset, nset=Fix
    9,   10,   11,   12,   15,   16
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*Elset, elset=Fix
  955,  986,  987, 1103, 1249, 1268
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*Nset, nset=Corner
 4,
*Elset, elset=_Constraint_S3, internal
  196,  279,  453,  576,  581,  602
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*Elset, elset=_Constraint_S4, internal
  837, 2754, 3210, 3333, 3444
*Elset, elset=_Constraint_S2, internal
 3184, 3344, 3372, 3451
*Elset, elset=_Constraint_S1, internal
 3278, 3409
*Surface, type=ELEMENT, name=Constraint
_Constraint_S3, S3
_Constraint_S4, S4
_Constraint_S2, S2
_Constraint_S1, S1
** Section: Section-1
*Solid Section, elset=_PickedSet2, material=Material-1
1.,
*End Part
**
*Part, name=c3d10h_32
*Node
      1,          48.,          52.,           5.
      2,          48.,          52.,           0.
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*Element, type=C3D10H
   1,  2368,  2369,  2370,  2371,  4384,  4383,  4382,  4386,  4385,  4387
   2,  2368,  2372,  2373,  2374,  4390,  4389,  4388,  4392,  4391,  4393
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*Node
  30275,          48.,          52.,          2.5
*Nset, nset=c3d10h_32-RefPt_, internal
30275,
*Nset, nset=_PickedSet2, internal, generate
     1,  30274,      1
*Elset, elset=_PickedSet2, internal, generate
     1,  19209,      1
*Nset, nset=_PickedSet24, internal
     1,     4,     5,     6,     9,    10
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*Elset, elset=_PickedSet24, internal
    24,    30,    63,    80,   138,   139
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*Nset, nset=_PickedSet25, internal
     2,     3,     7,     8,    11,    12
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*Elset, elset=_PickedSet25, internal
    84,   112,   178,   226,   245,   258
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*Nset, nset=Set-1
     1,     2,     3,     4,     5,     6
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*Elset, elset=Set-1
    47,    63,   112,   141,   160,   226
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*Nset, nset=RP
 30275,
*Nset, nset=Symmetry
     1,     2,     3,     4,     5,     6
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*Elset, elset=Symmetry
    24,    30,    63,    80,    84,   112
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*Nset, nset=Fix
     9,    10,    11,    12,    15,    16
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*Elset, elset=Fix
  4961,  6024,  6197,  6348,  6375,  6395
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*Nset, nset=Corner
 4,
*Elset, elset=_Constraint_S3, internal
    47,   339,  1123,  1146,  1538,  1618
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*Elset, elset=_Constraint_S1, internal
    87,  4056, 15443, 16743, 16854, 16859, 16861, 17295, 17407, 17590, 17699, 18751, 19132
*Elset, elset=_Constraint_S4, internal
  1780,  2154,  2461,  2477,  2487,  2646
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*Elset, elset=_Constraint_S2, internal
  2421,  3642,  4058, 15135, 16641, 16797, 19101
*Surface, type=ELEMENT, name=Constraint
_Constraint_S3, S3
_Constraint_S1, S1
_Constraint_S4, S4
_Constraint_S2, S2
** Section: Section-1
*Solid Section, elset=_PickedSet2, material=Material-1
1.,
*End Part
**
*Part, name=c3d10mh_04
*Node
      1,          48.,          52.,           5.
      2,          48.,          52.,           0.
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*Element, type=C3D10MH
 1,  72,  56,   5,  30,  81,  80,  79,  83,  82,  84
 2,  72,  55,  56,  28,  86,  85,  81,  88,  87,  89
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*Node
    436,          48.,          52.,          2.5
*Nset, nset=c3d10mh_04-RefPt_, internal
436,
*Nset, nset=_PickedSet2, internal, generate
   1,  435,    1
*Elset, elset=_PickedSet2, internal, generate
   1,  216,    1
*Nset, nset=_PickedSet24, internal
   1,   4,   5,   6,   9,  10
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*Elset, elset=_PickedSet24, internal
   3,  16,  22,  27,  28,  29
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*Nset, nset=_PickedSet25, internal
   2,   3,   7,   8,  11,  12
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*Elset, elset=_PickedSet25, internal
  14,  23,  24,  37,  38,  45
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*Nset, nset=Set-1
   1,   2,   3,   4,   5,   6
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*Elset, elset=Set-1
   3,  10,  11,  14,  16,  17
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*Nset, nset=RP
 436,
*Nset, nset=Symmetry
   1,   2,   3,   4,   5,   6
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*Elset, elset=Symmetry
   3,  14,  16,  22,  23,  24
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*Nset, nset=Fix
   9,  10,  11,  12,  15,  16
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*Elset, elset=Fix
  65,  66,  68,  71,  72,  78, 100, 103, 114, 116, 128, 130, 134, 135, 149, 157
*Nset, nset=Corner
 4,
*Elset, elset=_Constraint_S3, internal
  10,  13,  17,  21,  30,  34,  40,  41, 175, 191, 195, 202, 209, 214
*Elset, elset=_Constraint_S2, internal
 171,
*Elset, elset=_Constraint_S4, internal
 204,
*Surface, type=ELEMENT, name=Constraint
_Constraint_S3, S3
_Constraint_S2, S2
_Constraint_S4, S4
** Section: Section-1
*Solid Section, elset=_PickedSet2, material=Material-1
1.,
*End Part
**
*Part, name=c3d10mh_08
*Node
      1,          48.,          52.,           5.
      2,          48.,          52.,           0.
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*Element, type=C3D10MH
  1, 208,  36,  33,   6, 238, 237, 236, 240, 239, 241
  2, 208, 209, 106,  33, 244, 243, 242, 236, 245, 246
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*Node
   1404,          48.,          52.,          2.5
*Nset, nset=c3d10mh_08-RefPt_, internal
1404,
*Nset, nset=_PickedSet2, internal, generate
    1,  1403,     1
*Elset, elset=_PickedSet2, internal, generate
   1,  742,    1
*Nset, nset=_PickedSet24, internal
    1,    4,    5,    6,    9,   10
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*Elset, elset=_PickedSet24, internal
  10,  13,  19,  41,  42,  44
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*Nset, nset=_PickedSet25, internal
    2,    3,    7,    8,   11,   12
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*Elset, elset=_PickedSet25, internal
   9,  14,  15,  16,  25,  32
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*Nset, nset=Set-1
    1,    2,    3,    4,    5,    6
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*Elset, elset=Set-1
   8,   9,  13,  14,  16,  42
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*Nset, nset=RP
 1404,
*Nset, nset=Symmetry
    1,    2,    3,    4,    5,    6
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*Elset, elset=Symmetry
   9,  10,  13,  14,  15,  16
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*Nset, nset=Fix
    9,   10,   11,   12,   15,   16
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*Elset, elset=Fix
 244, 246, 254, 256, 259, 261
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*Nset, nset=Corner
 4,
*Elset, elset=_Constraint_S3, internal
  11,  47,  54, 111, 139, 153
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*Elset, elset=_Constraint_S4, internal
  48, 152, 161, 611
*Elset, elset=_Constraint_S2, internal
 110, 581, 703, 721, 726, 734
*Elset, elset=_Constraint_S1, internal
 550, 693
*Surface, type=ELEMENT, name=Constraint
_Constraint_S3, S3
_Constraint_S4, S4
_Constraint_S2, S2
_Constraint_S1, S1
** Section: Section-1
*Solid Section, elset=_PickedSet2, material=Material-1
1.,
*End Part
**
*Part, name=c3d10mh_16
*Node
      1,          48.,          52.,           5.
      2,          48.,          52.,           0.
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*Element, type=C3D10MH
  1,  672,  673,  674,  263,  928,  927,  926,  930,  929,  931
  2,  673,  204,  675,  313,  934,  933,  932,  936,  935,  937
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*Node
   5969,          48.,          52.,          2.5
*Nset, nset=c3d10mh_16-RefPt_, internal
5969,
*Nset, nset=_PickedSet2, internal, generate
    1,  5968,     1
*Elset, elset=_PickedSet2, internal, generate
    1,  3479,     1
*Nset, nset=_PickedSet24, internal
    1,    4,    5,    6,    9,   10
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*Elset, elset=_PickedSet24, internal
    6,   27,   34,   35,   44,   80
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*Nset, nset=_PickedSet25, internal
    2,    3,    7,    8,   11,   12
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*Elset, elset=_PickedSet25, internal
   13,   31,   55,   87,   88,  120
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*Nset, nset=Set-1
    1,    2,    3,    4,    5,    6
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*Elset, elset=Set-1
   34,   80,   88,  159,  166,  190
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*Nset, nset=RP
 5969,
*Nset, nset=Symmetry
    1,    2,    3,    4,    5,    6
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*Elset, elset=Symmetry
    6,   13,   27,   31,   34,   35
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*Nset, nset=Fix
    9,   10,   11,   12,   15,   16
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*Elset, elset=Fix
  955,  986,  987, 1103, 1249, 1268
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*Nset, nset=Corner
 4,
*Elset, elset=_Constraint_S3, internal
  196,  279,  453,  576,  581,  602
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*Elset, elset=_Constraint_S4, internal
  837, 2754, 3210, 3333, 3444
*Elset, elset=_Constraint_S2, internal
 3184, 3344, 3372, 3451
*Elset, elset=_Constraint_S1, internal
 3278, 3409
*Surface, type=ELEMENT, name=Constraint
_Constraint_S3, S3
_Constraint_S4, S4
_Constraint_S2, S2
_Constraint_S1, S1
** Section: Section-1
*Solid Section, elset=_PickedSet2, material=Material-1
1.,
*End Part
**
*Part, name=c3d10mh_32
*Node
      1,          48.,          52.,           5.
      2,          48.,          52.,           0.
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*Element, type=C3D10MH
   1,  2368,  2369,  2370,  2371,  4384,  4383,  4382,  4386,  4385,  4387
   2,  2368,  2372,  2373,  2374,  4390,  4389,  4388,  4392,  4391,  4393
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*Node
  30275,          48.,          52.,          2.5
*Nset, nset=c3d10mh_32-RefPt_, internal
30275,
*Nset, nset=_PickedSet2, internal, generate
     1,  30274,      1
*Elset, elset=_PickedSet2, internal, generate
     1,  19209,      1
*Nset, nset=_PickedSet24, internal
     1,     4,     5,     6,     9,    10
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*Elset, elset=_PickedSet24, internal
    24,    30,    63,    80,   138,   139
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*Nset, nset=_PickedSet25, internal
     2,     3,     7,     8,    11,    12
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*Elset, elset=_PickedSet25, internal
    84,   112,   178,   226,   245,   258
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*Nset, nset=Set-1
     1,     2,     3,     4,     5,     6
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*Elset, elset=Set-1
    47,    63,   112,   141,   160,   226
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*Nset, nset=RP
 30275,
*Nset, nset=Symmetry
     1,     2,     3,     4,     5,     6
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*Elset, elset=Symmetry
    24,    30,    63,    80,    84,   112
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*Nset, nset=Fix
     9,    10,    11,    12,    15,    16
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*Elset, elset=Fix
  4961,  6024,  6197,  6348,  6375,  6395
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*Nset, nset=Corner
 4,
*Elset, elset=_Constraint_S3, internal
    47,   339,  1123,  1146,  1538,  1618
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*Elset, elset=_Constraint_S1, internal
    87,  4056, 15443, 16743, 16854, 16859, 16861, 17295, 17407, 17590, 17699, 18751, 19132
*Elset, elset=_Constraint_S4, internal
  1780,  2154,  2461,  2477,  2487,  2646
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*Elset, elset=_Constraint_S2, internal
  2421,  3642,  4058, 15135, 16641, 16797, 19101
*Surface, type=ELEMENT, name=Constraint
_Constraint_S3, S3
_Constraint_S1, S1
_Constraint_S4, S4
_Constraint_S2, S2
** Section: Section-1
*Solid Section, elset=_PickedSet2, material=Material-1
1.,
*End Part
**
**
** ASSEMBLY
**
*Assembly, name=Assembly
**
*Instance, name=c3d4h_04-1, part=c3d4h_04
*End Instance
**
*Instance, name=c3d4h_08-1, part=c3d4h_08
        52.8,           0.,           0.
*End Instance
**
*Instance, name=c3d4h_16-1, part=c3d4h_16
       105.6,           0.,           0.
*End Instance
**
*Instance, name=c3d4h_32-1, part=c3d4h_32
       158.4,           0.,           0.
*End Instance
**
*Instance, name=c3d10mh_04-1, part=c3d10mh_04
       211.2,           0.,           0.
*End Instance
**
*Instance, name=c3d10mh_08-1, part=c3d10mh_08
        264.,           0.,           0.
*End Instance
**
*Instance, name=c3d10mh_16-1, part=c3d10mh_16
       316.8,           0.,           0.
*End Instance
**
*Instance, name=c3d10mh_32-1, part=c3d10mh_32
       369.6,           0.,           0.
*End Instance
**
*Instance, name=c3d8h_04-1, part=c3d8h_04
       633.6,           0.,           0.
*End Instance
**
*Instance, name=c3d8h_08-1, part=c3d8h_08
       686.4,           0.,           0.
*End Instance
**
*Instance, name=c3d8h_16-1, part=c3d8h_16
       739.2,           0.,           0.
*End Instance
**
*Instance, name=c3d8h_32-1, part=c3d8h_32
        792.,           0.,           0.
*End Instance
**
*Instance, name=c3d8ih_04-1, part=c3d8ih_04
       844.8,           0.,           0.
*End Instance
**
*Instance, name=c3d8ih_08-1, part=c3d8ih_08
       897.6,           0.,           0.
*End Instance
**
*Instance, name=c3d8ih_16-1, part=c3d8ih_16
       950.4,           0.,           0.
*End Instance
**
*Instance, name=c3d8ih_32-1, part=c3d8ih_32
      1003.2,           0.,           0.
*End Instance
**
*Instance, name=c3d8rh_04-1, part=c3d8rh_04
       1056.,           0.,           0.
*End Instance
**
*Instance, name=c3d8rh_08-1, part=c3d8rh_08
      1108.8,           0.,           0.
*End Instance
**
*Instance, name=c3d8rh_16-1, part=c3d8rh_16
      1161.6,           0.,           0.
*End Instance
**
*Instance, name=c3d8rh_32-1, part=c3d8rh_32
      1214.4,           0.,           0.
*End Instance
**
*Instance, name=c3d10h_04-1, part=c3d10h_04
       422.4,           0.,           0.
*End Instance
**
*Instance, name=c3d10h_08-1, part=c3d10h_08
       475.2,           0.,           0.
*End Instance
**
*Instance, name=c3d10h_16-1, part=c3d10h_16
        528.,           0.,           0.
*End Instance
**
*Instance, name=c3d10h_32-1, part=c3d10h_32
       580.8,           0.,           0.
*End Instance
**
*Nset, nset=Fix, instance=c3d4h_04-1
  9, 10, 11, 12, 15, 16, 33, 35, 36, 37, 41, 43, 45, 60, 65
*Nset, nset=Fix, instance=c3d4h_08-1
   9,  10,  11,  12,  15,  16
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*Nset, nset=Fix, instance=c3d4h_16-1
   9,  10,  11,  12,  15,  16
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*Nset, nset=Fix, instance=c3d10mh_16-1
    9,   10,   11,   12,   15,   16
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*Nset, nset=Fix, instance=c3d8h_08-1
   9,  10,  11,  12,  15,  16
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*Nset, nset=Fix, instance=c3d8rh_08-1
   9,  10,  11,  12,  15,  16
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*Nset, nset=Fix, instance=c3d10h_32-1
     9,    10,    11,    12,    15,    16
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*Nset, nset=Fix, instance=c3d8ih_08-1
   9,  10,  11,  12,  15,  16
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*Nset, nset=Fix, instance=c3d10mh_04-1
   9,  10,  11,  12,  15,  16
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*Nset, nset=Fix, instance=c3d8h_32-1
    9,   10,   11,   12,   15,   16
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*Nset, nset=Fix, instance=c3d8rh_32-1
    9,   10,   11,   12,   15,   16
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*Nset, nset=Fix, instance=c3d8h_04-1
  9, 10, 11, 12, 15, 16, 33, 36, 37, 38, 41, 43, 45, 60, 67
*Nset, nset=Fix, instance=c3d10h_08-1
    9,   10,   11,   12,   15,   16
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*Nset, nset=Fix, instance=c3d8ih_32-1
    9,   10,   11,   12,   15,   16
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*Nset, nset=Fix, instance=c3d4h_32-1
    9,   10,   11,   12,   15,   16
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*Nset, nset=Fix, instance=c3d10mh_32-1
     9,    10,    11,    12,    15,    16
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*Nset, nset=Fix, instance=c3d8h_16-1
   9,  10,  11,  12,  15,  16
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*Nset, nset=Fix, instance=c3d8rh_16-1
   9,  10,  11,  12,  15,  16
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*Nset, nset=Fix, instance=c3d8ih_16-1
   9,  10,  11,  12,  15,  16
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*Nset, nset=Fix, instance=c3d10h_04-1
   9,  10,  11,  12,  15,  16
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*Nset, nset=Fix, instance=c3d10mh_08-1
    9,   10,   11,   12,   15,   16
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*Nset, nset=Fix, instance=c3d8ih_04-1
  9, 10, 11, 12, 15, 16, 33, 36, 37, 38, 41, 43, 45, 60, 67
*Nset, nset=Fix, instance=c3d8rh_04-1
  9, 10, 11, 12, 15, 16, 33, 36, 37, 38, 41, 43, 45, 60, 67
*Nset, nset=Fix, instance=c3d10h_16-1
    9,   10,   11,   12,   15,   16
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*Elset, elset=Fix, instance=c3d4h_04-1
  65,  66,  68,  71,  72,  78, 100, 103, 114, 116, 128, 130, 134, 135, 149, 157
*Elset, elset=Fix, instance=c3d4h_08-1
 244, 246, 254, 256, 259, 261
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*Elset, elset=Fix, instance=c3d4h_16-1
  955,  986,  987, 1103, 1249, 1268
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*Elset, elset=Fix, instance=c3d10mh_16-1
  955,  986,  987, 1103, 1249, 1268
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*Elset, elset=Fix, instance=c3d8h_08-1
 33, 37, 41, 45, 49, 53, 57, 61, 71, 72, 79, 80, 87, 88, 95, 96
*Elset, elset=Fix, instance=c3d8rh_08-1
 33, 37, 41, 45, 49, 53, 57, 61, 71, 72, 79, 80, 87, 88, 95, 96
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*Nset, nset=Symmetry, instance=c3d4h_04-1
  1,  2,  3,  4,  5,  6
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*Nset, nset=Symmetry, instance=c3d4h_08-1
   1,   2,   3,   4,   5,   6
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*Nset, nset=Symmetry, instance=c3d4h_16-1
   1,   2,   3,   4,   5,   6
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*Nset, nset=Symmetry, instance=c3d10mh_16-1
    1,    2,    3,    4,    5,    6
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*Nset, nset=Symmetry, instance=c3d8h_08-1
   1,   2,   3,   4,   5,   6
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*Nset, nset=Symmetry, instance=c3d8rh_08-1
   1,   2,   3,   4,   5,   6
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*Nset, nset=Symmetry, instance=c3d10h_32-1
     1,     2,     3,     4,     5,     6
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*Nset, nset=Symmetry, instance=c3d8ih_08-1
   1,   2,   3,   4,   5,   6
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*Nset, nset=Symmetry, instance=c3d10mh_04-1
   1,   2,   3,   4,   5,   6
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*Nset, nset=Symmetry, instance=c3d8h_32-1
    1,    2,    3,    4,    5,    6
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*Nset, nset=Symmetry, instance=c3d8rh_32-1
    1,    2,    3,    4,    5,    6
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*Nset, nset=Symmetry, instance=c3d8h_04-1
  1,  2,  3,  4,  5,  6
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*Nset, nset=Symmetry, instance=c3d10h_08-1
    1,    2,    3,    4,    5,    6
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*Nset, nset=Symmetry, instance=c3d8ih_32-1
    1,    2,    3,    4,    5,    6
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*Nset, nset=Symmetry, instance=c3d4h_32-1
    1,    2,    3,    4,    5,    6
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*Nset, nset=Symmetry, instance=c3d10mh_32-1
     1,     2,     3,     4,     5,     6
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*Nset, nset=Symmetry, instance=c3d8h_16-1
   1,   2,   3,   4,   5,   6
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*Nset, nset=Symmetry, instance=c3d8rh_16-1
   1,   2,   3,   4,   5,   6
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*Nset, nset=Symmetry, instance=c3d8ih_16-1
   1,   2,   3,   4,   5,   6
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*Nset, nset=Symmetry, instance=c3d10h_04-1
   1,   2,   3,   4,   5,   6
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*Nset, nset=Symmetry, instance=c3d10mh_08-1
    1,    2,    3,    4,    5,    6
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*Nset, nset=Symmetry, instance=c3d8ih_04-1
  1,  2,  3,  4,  5,  6
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*Nset, nset=Symmetry, instance=c3d8rh_04-1
  1,  2,  3,  4,  5,  6
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*Nset, nset=Symmetry, instance=c3d10h_16-1
    1,    2,    3,    4,    5,    6
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*Nset, nset=RP, instance=c3d4h_04-1
 79,
*Nset, nset=RP, instance=c3d4h_08-1
 236,
*Nset, nset=RP, instance=c3d4h_16-1
 926,
*Nset, nset=RP, instance=c3d10mh_16-1
 5969,
*Nset, nset=RP, instance=c3d8h_08-1
 244,
*Nset, nset=RP, instance=c3d8rh_08-1
 244,
*Nset, nset=RP, instance=c3d10h_32-1
 30275,
*Nset, nset=RP, instance=c3d8ih_08-1
 244,
*Nset, nset=RP, instance=c3d10mh_04-1
 436,
*Nset, nset=RP, instance=c3d8h_32-1
 5446,
*Nset, nset=RP, instance=c3d8rh_32-1
 5446,
*Nset, nset=RP, instance=c3d8h_04-1
 76,
*Nset, nset=RP, instance=c3d10h_08-1
 1404,
*Nset, nset=RP, instance=c3d8ih_32-1
 5446,
*Nset, nset=RP, instance=c3d4h_32-1
 4382,
*Nset, nset=RP, instance=c3d10mh_32-1
 30275,
*Nset, nset=RP, instance=c3d8h_16-1
 868,
*Nset, nset=RP, instance=c3d8rh_16-1
 868,
*Nset, nset=RP, instance=c3d8ih_16-1
 868,
*Nset, nset=RP, instance=c3d10h_04-1
 436,
*Nset, nset=RP, instance=c3d10mh_08-1
 1404,
*Nset, nset=RP, instance=c3d8ih_04-1
 76,
*Nset, nset=RP, instance=c3d8rh_04-1
 76,
*Nset, nset=RP, instance=c3d10h_16-1
 5969,
*Nset, nset=Corner, instance=c3d4h_04-1
 4,
*Nset, nset=Corner, instance=c3d4h_08-1
 4,
*Nset, nset=Corner, instance=c3d4h_16-1
 4,
*Nset, nset=Corner, instance=c3d10mh_16-1
 4,
*Nset, nset=Corner, instance=c3d8h_08-1
 4,
*Nset, nset=Corner, instance=c3d8rh_08-1
 4,
*Nset, nset=Corner, instance=c3d10h_32-1
 4,
*Nset, nset=Corner, instance=c3d8ih_08-1
 4,
*Nset, nset=Corner, instance=c3d10mh_04-1
 4,
*Nset, nset=Corner, instance=c3d8h_32-1
 4,
*Nset, nset=Corner, instance=c3d8rh_32-1
 4,
*Nset, nset=Corner, instance=c3d8h_04-1
 4,
*Nset, nset=Corner, instance=c3d10h_08-1
 4,
*Nset, nset=Corner, instance=c3d8ih_32-1
 4,
*Nset, nset=Corner, instance=c3d4h_32-1
 4,
*Nset, nset=Corner, instance=c3d10mh_32-1
 4,
*Nset, nset=Corner, instance=c3d8h_16-1
 4,
*Nset, nset=Corner, instance=c3d8rh_16-1
 4,
*Nset, nset=Corner, instance=c3d8ih_16-1
 4,
*Nset, nset=Corner, instance=c3d10h_04-1
 4,
*Nset, nset=Corner, instance=c3d10mh_08-1
 4,
*Nset, nset=Corner, instance=c3d8ih_04-1
 4,
*Nset, nset=Corner, instance=c3d8rh_04-1
 4,
*Nset, nset=Corner, instance=c3d10h_16-1
 4,
** Constraint: c3d4h_04
*Coupling, constraint name=c3d4h_04, ref node=c3d4h_04-1.RP, surface=c3d4h_04-1.Constraint
*Distributing, weighting method=UNIFORM
** Constraint: c3d4h_08
*Coupling, constraint name=c3d4h_08, ref node=c3d4h_08-1.RP, surface=c3d4h_08-1.Constraint
*Distributing, weighting method=UNIFORM
** Constraint: c3d4h_16
*Coupling, constraint name=c3d4h_16, ref node=c3d4h_16-1.RP, surface=c3d4h_16-1.Constraint
*Distributing, weighting method=UNIFORM
** Constraint: c3d4h_32
*Coupling, constraint name=c3d4h_32, ref node=c3d4h_32-1.RP, surface=c3d4h_32-1.Constraint
*Distributing, weighting method=UNIFORM
** Constraint: c3d8h_04
*Coupling, constraint name=c3d8h_04, ref node=c3d8h_04-1.RP, surface=c3d8h_04-1.Constraint
*Distributing, weighting method=UNIFORM
** Constraint: c3d8h_08
*Coupling, constraint name=c3d8h_08, ref node=c3d8h_08-1.RP, surface=c3d8h_08-1.Constraint
*Distributing, weighting method=UNIFORM
** Constraint: c3d8h_16
*Coupling, constraint name=c3d8h_16, ref node=c3d8h_16-1.RP, surface=c3d8h_16-1.Constraint
*Distributing, weighting method=UNIFORM
** Constraint: c3d8h_32
*Coupling, constraint name=c3d8h_32, ref node=c3d8h_32-1.RP, surface=c3d8h_32-1.Constraint
*Distributing, weighting method=UNIFORM
** Constraint: c3d8ih_04
*Coupling, constraint name=c3d8ih_04, ref node=c3d8ih_04-1.RP, surface=c3d8ih_04-1.Constraint
*Distributing, weighting method=UNIFORM
** Constraint: c3d8ih_08
*Coupling, constraint name=c3d8ih_08, ref node=c3d8ih_08-1.RP, surface=c3d8ih_08-1.Constraint
*Distributing, weighting method=UNIFORM
** Constraint: c3d8ih_16
*Coupling, constraint name=c3d8ih_16, ref node=c3d8ih_16-1.RP, surface=c3d8ih_16-1.Constraint
*Distributing, weighting method=UNIFORM
** Constraint: c3d8ih_32
*Coupling, constraint name=c3d8ih_32, ref node=c3d8ih_32-1.RP, surface=c3d8ih_32-1.Constraint
*Distributing, weighting method=UNIFORM
** Constraint: c3d8rh_04
*Coupling, constraint name=c3d8rh_04, ref node=c3d8rh_04-1.RP, surface=c3d8rh_04-1.Constraint
*Distributing, weighting method=UNIFORM
** Constraint: c3d8rh_08
*Coupling, constraint name=c3d8rh_08, ref node=c3d8rh_08-1.RP, surface=c3d8rh_08-1.Constraint
*Distributing, weighting method=UNIFORM
** Constraint: c3d8rh_16
*Coupling, constraint name=c3d8rh_16, ref node=c3d8rh_16-1.RP, surface=c3d8rh_16-1.Constraint
*Distributing, weighting method=UNIFORM
** Constraint: c3d8rh_32
*Coupling, constraint name=c3d8rh_32, ref node=c3d8rh_32-1.RP, surface=c3d8rh_32-1.Constraint
*Distributing, weighting method=UNIFORM
** Constraint: c3d10h_04
*Coupling, constraint name=c3d10h_04, ref node=c3d10h_04-1.RP, surface=c3d10h_04-1.Constraint
*Distributing, weighting method=UNIFORM
** Constraint: c3d10h_08
*Coupling, constraint name=c3d10h_08, ref node=c3d10h_08-1.RP, surface=c3d10h_08-1.Constraint
*Distributing, weighting method=UNIFORM
** Constraint: c3d10h_16
*Coupling, constraint name=c3d10h_16, ref node=c3d10h_16-1.RP, surface=c3d10h_16-1.Constraint
*Distributing, weighting method=UNIFORM
** Constraint: c3d10h_32
*Coupling, constraint name=c3d10h_32, ref node=c3d10h_32-1.RP, surface=c3d10h_32-1.Constraint
*Distributing, weighting method=UNIFORM
** Constraint: c3d10mh_04
*Coupling, constraint name=c3d10mh_04, ref node=c3d10mh_04-1.RP, surface=c3d10mh_04-1.Constraint
*Distributing, weighting method=UNIFORM
** Constraint: c3d10mh_08
*Coupling, constraint name=c3d10mh_08, ref node=c3d10mh_08-1.RP, surface=c3d10mh_08-1.Constraint
*Distributing, weighting method=UNIFORM
** Constraint: c3d10mh_16
*Coupling, constraint name=c3d10mh_16, ref node=c3d10mh_16-1.RP, surface=c3d10mh_16-1.Constraint
*Distributing, weighting method=UNIFORM
** Constraint: c3d10mh_32
*Coupling, constraint name=c3d10mh_32, ref node=c3d10mh_32-1.RP, surface=c3d10mh_32-1.Constraint
*Distributing, weighting method=UNIFORM
*End Assembly
**
** MATERIALS
**
*Material, name=Material-1
*Hyperelastic, neo hooke
 0.4, 0.00025
** ----------------------------------------------------------------
**
** STEP: Step-1
**
*Step, name=Step-1, nlgeom=YES, inc=1
*Static
1., 1., 1e-05, 1.
**
** BOUNDARY CONDITIONS
**
** Name: BC-1 Type: Symmetry/Antisymmetry/Encastre
*Boundary
Fix, ENCASTRE
** Name: BC-2 Type: Symmetry/Antisymmetry/Encastre
*Boundary
Symmetry, ZSYMM
**
** LOADS
**
** Name: Load-1   Type: Concentrated force
*Cload
RP, 2, 5.
**
** OUTPUT REQUESTS
**
*Restart, write, frequency=0
**
** FIELD OUTPUT: F-Output-1
**
*Output, field, frequency=99999
*Node Output
UT,
*Element Output, directions=YES
S,
**
** HISTORY OUTPUT: H-Output-1
**
*Output, history
*Node Output, nset=Corner
U1, U2
**
** PRINT TO DAT FILE
**
*Node Print, nset=Corner, freq=999
U1, U2
*End Step
